# OpenSim document version 30000
Model test:
  credits: Conlain Kelly
  publications: For testing
  length_units: meters
  force_units: N
  gravity: 0 -9.80665 0
  BodySet:
    Body ground: mass=0 mass_center=(0 0 0) inertia_xx=0 inertia_yy=0 inertia_zz=0 meshes=Unassigned
    Body rod: mass=1 mass_center=(0 1 0) inertia_xx=1 inertia_yy=1 inertia_zz=1 meshes=(cylinder.vtp sphere.vtp)
      PinJoint pin1: parent_body=ground location_in_parent=(0 0 0) location=(0 .5 0)
        Coordinate q1: motion_type=rotational default_value=2.356194 range=(-1.570796 1.570796) clamped=false
  MarkerSet:
    Marker body1: rod (0 0 0)
